# Задание 2
Xa := 3
Xb := 15
Xc := 16
Xm := 4
Xn := 6
Xp := 14
Ya := 16
Yb := 9
Yc := 17
Ym := 4
Yn := 0
Yp := 0
Za := 10
Zb := 16
Zc := 9
Zm := 8
Zn := 18
Zp := 4
A(x, y) := [Xa; Ya; Za]
B(x, y) := [Xb; Yb; Zb]
C(x, y) := [Xc; Yc; Zc]
M(x, y) := [Xm; Ym; Zm]
N(x, y) := [Xn; Yn; Zn]
Z(x, y) := [Xp; Yp; Zp]
LineAC(u, v) := [Xa + (Xc - Xa)*u; Ya + (Yc - Ya)*u; Za + (Zc - Za)*u]
LineAB(u, v) := [Xa + (Xb - Xa)*u; Ya + (Yb - Ya)*u; Za + (Zb - Za)*u]
LineBC(u, v) := [Xb + (Xc - Xb)*u; Yb + (Yc - Yb)*u; Zb + (Zc - Zb)*u]
LineMN(u, v) := [Xm + (Xn - Xm)*u; Ym + (Yn - Ym)*u; Zm + (Zn - Zm)*u]
Lab := CreateMesh(LineAB, 0, 1, 0, 0)
Lbc := CreateMesh(LineBC, 0, 1, 0, 0)
Lac := CreateMesh(LineAC, 0, 1, 0, 0)
Lmn := CreateMesh(LineMN, 0, 1, 0, 0)
# [component: inputs Lab, Lac, Lbc, Lmn, Z, A, B, C, M, N]
# Задание 3
det([x - Xa, y - Ya, z - Za; Ya - Xa, Yb - Ya, Zb - Za; Xc - Xa, Yc - Ya, Zc - Za]) → x + 91*y + 104*z - 2499
x + 91*y + 104*z - 2499 == 0 solve, z → 2499/104 - 7*y/8 - x/104
z(x, y) := 2499/104 - 7*y/8 - x/104
Plane3(x, y) := [x; y; z(x, y)]
P3 := CreateMesh(Plane3, 20, 1, 20, 7, 7, 10)
# [component: inputs Lab, Lac, Lbc, Lmn, Z, A, B, C, M, N, P3]
# Задание 4
(x - Xm)/(Xn - Xm) == (y - Ym)/(Yn - Ym) == (z - Zm)/(Zn - Zm) == t
Given
x == Xm + (Xn - Xm)*t
y == Ym + (Yn - Ym)*t
z == Zm + (Zn - Zm)*t
x + 91*y + 104*z - 2499 == 0
Find(x, y, z, t) → [885/113; -414/113; 3069/113; 433/226]
Peres(x, y) := [885/113; -414/113; 3069/113]
Lmn := CreateMesh(LineMN, 0, 2.5, 0, 0)
P3 := CreateMesh(Plane3, 20, 1, 20, -10, 7, 15)
# [component: inputs Lab, Lac, Lbc, Lmn, Z, A, B, C, P3, Peres]
# Задание 5
Lmn := CreateMesh(LineMN, 0, 1, 0, 0)
P3 := CreateMesh(Plane3, 20, 1, 20, 7, 7, 10)
# [component: inputs Lab, Lac, Lbc, Lmn, Z, A, B, C, M, N, P3]
# Задание 6
# Задание 7
x + 91*y + 104*z - 2499
p1 := -1
p2 := -91
p3 := -104
p4 := 2499
p1*(xx - Xp) + p2*(yy - Yp) + p3*(zz - Zp) == 0 solve, zz → 215/52 - 7*yy/8 - xx/104
Plane72(xx, yy) := [xx; yy; 215/52 - 7*yy/8 - xx/104]
P72 := CreateMesh(Plane72, 20, 1, 20, -5., 7, 20)
# [component: inputs Lab, Lac, Lbc, Lmn, Z, A, B, C, M, N, P3, P72]
# Задание 8
